# PREREQUISITES:
#
#     You must use moltemplate.sh to create 3 files:
#        system.data  system.in.init  system.in.settings
#     (Follow the instructions in README_setup.sh,
#      or run the file as a script using ./README_setup.sh)

# ------------------------------- Initialization Section --------------------

units real
atom_style full
pair_style lj/class2/coul/cut 10.0
bond_style class2
angle_style class2
dihedral_style class2
improper_style class2


# ------------------------------- Atom Definition Section -------------------

read_data       "pack_mol.data" extra/bond/per/atom 1 extra/angle/per/atom 12 extra/dihedral/per/atom 12 extra/improper/per/atom 12 extra/special/per/atom 12

include calc.pram

# ------------------------------- OPT Section -------------------------------
minimize 1.0e-5 1.0e-7 100000 400000
# ------------------------------- Run Section -------------------------------
#

thermo_style custom step temp pe evdwl ecoul ebond eangle edihed eimp density vol
thermo          100

neigh_modify delay 0 every 1 check yes

fix Langevin  all langevin 300 300 100.0 482432
fix moveLimit all nve/limit 0.1
run 10000
unfix Langevin
unfix moveLimit


fix 		relax all npt temp 300.0 300.0 100 iso 1.0 1.0 1000
run 50000
unfix relax

molecule 	pre1 pre1
molecule	post1 post1
molecule 	pre2 pre2
molecule	post2 post2
molecule 	pre3 pre3
molecule	post3 post3
molecule 	pre4 pre4
molecule	post4 post4

fix		fxrct all bond/react stabilization yes statted_grp .03 &
		 react rxn1 all 100 0.0 4.0 pre1 post1 semi.map1 stabilize_steps 10 molecule inter &
		 react rxn2 all 100 0.0 4.0 pre2 post2 semi.map2 stabilize_steps 10 molecule inter &
		 react rxn2 all 100 0.0 4.0 pre3 post3 semi.map3 stabilize_steps 10 molecule inter &
		 react rxn2 all 100 0.0 4.0 pre4 post4 semi.map4 stabilize_steps 10 molecule inter &

fix 		npt statted_grp_REACT npt temp 500.0 500.0 100 iso 1.0 1.0 1000
fix 		reacted bond_react_MASTER_group temp/rescale 1 300.0 300.0 1 1

fix 		moveLimit all nve/limit 0.1

thermo_style custom step temp pe evdwl ecoul ebond eangle edihed eimp density vol f_fxrct[*]
thermo     100


compute 1 all property/local btype batom1 batom2

dump DumpPos all custom 1000 dump.pos id type x y z mol
dump DumpBond all local 1000 bonds.dump index c_1[*]

run 500000

unfix moveLimit
unfix reacted
unfix npt
unfix fxrct

write_data nofoeff reaxed.data

thermo_style custom step temp pe evdwl ecoul ebond eangle edihed eimp density vol
fix 		relax all npt temp 600.0 600.0 100 iso 1.0 1.0 1000
run 100000
